<?xml version="1.0"?>

<!--
  File:     PrattWhitneyR2800DoubleWasp.xml
  Author:   AeromatiC++ v 3.3.9

  See: http://wiki.flightgear.org/JSBSim_Engines#FGPiston

  Inputs:
    name:           PrattWhitneyR2800DoubleWasp  (model R-2800-51M1)
	                (if you should find "propHamiltonStandard3Blade".xml (important: prefix: "prop")
					 somewhere - that happened by mistake - change it to this filename)
    type:           Piston Engine
    power:          2000 hp
-->

<piston_engine name="propHamiltonStandard3Blade">
  <minmp unit="INHG">         10.0 </minmp>
  <maxmp unit="INHG">         52.0 </maxmp><!--21(aeromatic)-airmanitoba4-10-5-->
    <displacement unit="IN3"> 3798.92 </displacement>
  <maxhp>       2000.0 </maxhp>
  <cycles>         4.0 </cycles>
  <idlerpm>      650.0 </idlerpm>
  <maxrpm>      2905.0 </maxrpm><!-- overspeed (airmanitoba)/ regular at maxhp: 2700rpm-->
  <sparkfaildrop>  0.1 </sparkfaildrop>
  <compression-ratio>6.75</compression-ratio><!--wikipedia: 6.75:1-->
  <volumetric-efficiency> 0.71 </volumetric-efficiency><!--wikipedia/aeromatic0.85-->
  <man-press-lag> 0.1 </man-press-lag>
  <static-friction  unit="HP"> 9.99715 </static-friction>
  <starter-torque> 1599.54 </starter-torque>
  <starter-rpm> 1400 </starter-rpm>
 <!-- Defining <bsfc> over-rides the built-in horsepower calculations -->
 <!--<bsfc>           0.45 </bsfc>-->
  <stroke unit="IN">  6    </stroke><!-- <Wikipedia/Aeromatic>4.375-->
  <bore unit="IN">    5.75 </bore><!--Wikipedia-->
  <cylinders>         18   </cylinders><!--42-->

  <numboostspeeds> 2 </numboostspeeds>
  <boostmanual> 0 </boostmanual>
</piston_engine>
